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α_1 := 3
α_2 := 1
N_z := 6
K := α_2*N_z + 10*α_1 = 36
j := sqrt(-1)
n_1 := 3
n_2 := 1
n_3 := 0
n_4 := 6
C := 310
b_1 := 1.4
# n_4 - парна
x := n_1 = 3
y := n_2 + n_3 = 1
z := n_4
m_1 := x + y + z = 10
m_2 := 2*(x + y + 2*z) = 32
W(p) := (p + m_2)/((p + x)*(p + y)*(p + z)) → (p + 32)/((p + 1)*(p + 3)*(p + 6))
W(p) collect → (p + 32)/(p^3 + 10*p^2 + 27*p + 18)
# q(a), q`(a) - коеффіцієнти гармонічної  лінеаризації.
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# Оскільки нелінійність однозначна і симетрична, а дія g(t)=0, в системі
# можуть виникнути тільки симетричні коливання, причому коеффіцієнт q`(a)=0.
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q(a) == 1/(π*a)*integral(Φ(a*sin(ω*t))*sin(ω*t), ω = 0 .. 2*π)*t == 4*310/(π*a)*cos(α_1)
# непарно-симетрична нелінійність однозначна (рис.90), то q`(a) тотожний 0 .
# Гармонічно лінеаризована передаточна функція нелінійної ланки має
# вигляд
W_H(a, p) == Y(p)/X(p) == q(a) + q'(a)/ω*p
4*310 → 1240 = 1240
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q(a) == 1/(π*a)*integral(ξ(t)*sin(ω*t), ω = 0 .. 2*π)*t == 4/(π*a)*integral(C*sin(ω*t), ω = α_1 .. 2*π)*t
sin(α_1) == b/a
# Тоді
q(a) == 1240/(π*a)*sqrt(1 - (b/a)^2)  # , a >= b
# З урахуванням виразів для передаточних функцій лінеаризованої
# нелінійності і лінійної частини знаходимо характеристичне рівняння
# гармонічно лінеаризованної  системи
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# Режим автоколивань можливий тільки при наявності пари чисто уявних
# коренів p1,2 = +- jω. Підставляючи jω замість р, отримаємо
(p + 1)*(p + 3)*(p + 6) + (p + 32)*q(a) == 0
(j*ω + 1)*(j*ω + 3)*(j*ω + 6) + (j*ω + 32)*q(a) == 0
(j*ω + 1)*(j*ω + 3)*(j*ω + 6) simplify; rectangular → 18 - 10*ω^2 - ω*(ω^2 - 27)*1i
18 + 32*q(a) - 10*ω^2 - ω*(ω^2 - 27 + q(a))*j == 0
(j*ω + 1)*(j*ω + 3)*(j*ω + 6) + (j*ω + 32) simplify; rectangular → 50 - 10*ω^2 - ω*(ω^2 - 28)*1i
P(a, ω) == 18 + 32*q(a) - 10*ω^2 == 0
Q(a, ω) == -ω*(ω^2 - 27 + q(a)) == 0
# З другого рівняння визначаємо частоту періодичного рішення
-ω*(ω^2 - 27 + q(a)) solve, ω → [0; sqrt(q(a) - 27)*1i; -sqrt(q(a) - 27)*1i]
18 + 32*q(a) - 10*ω^2 == 0 substitute, ω == sqrt(q(a) - 27)*j → 42*q(a) - 252 == 0
252/42 = 6
q(a) == 252/42 == 6
# Для визначення стійкості отриманого рішення необхідно розрахувати
# частні похідні
d/da(18 + 32*q(a) - 10*ω^2) → 32*d/da(q(a))
d/dω(18 + 32*q(a) - 10*ω^2) → -20*ω
(d/da(P))^X == 32*d/da(q(a))
(d/dω(P))^X == (-20*ω < 0)
d/da(-ω*(ω^2 - 27 + q(a))) → -ω*d/da(q(a))
(d/da(Q))^X == -ω*d/da(q(a))
(d/dω(Q))^X == (27 - q(a) - 3*ω^2 < 0)
d/dω(-ω*(ω^2 - 27 + q(a))) → 27 - q(a) - 3*ω^2
# Для стійкості періодичного рішення необхідно, щоб виконувалась нерівність
(d/da(P))^X*(d/dω(Q))^X - (d/dω(P))^X*(d/da(Q))^X > 0
32*d/da(q(a))*(27 - q(a) - 3*ω^2) - (-20*ω)*(-ω*d/da(q(a))) → -32*d/da(q(a))*(3*ω^2 + q(a) - 27) - 20*ω^2*d/da(q(a)) simplify → -4*d/da(q(a))*(29*ω^2 + 8*q(a) - 216)
# Враховуючи знайдені значення частних похідних, отримаємо
-4*d/da(q(a)*(29*ω^2 + 8*q(a) - 216)) → -32*q(a)*d/da(q(a)) - 4*d/da(q(a))*(29*ω^2 + 8*q(a) - 216)
(d/da(P))^X*(d/dω(Q))^X > 0
-4*d/da(q(a)*(29*ω^2 + 8*q(a) - 216)) solve, ω → [2*sqrt(58)*sqrt(27 - 2*q(a))/29; -2*sqrt(58)*sqrt(27 - 2*q(a))/29]
32*d/da(q(a)*(27 - q(a) - 3*ω^2)) > 0
32*d/da(q(a)*(27 - q(a) - 3*ω^2)) solve, ω → [sqrt(3)*sqrt(27 - 2*q(a))/3; -sqrt(3)*sqrt(27 - 2*q(a))/3]
q(a) := 1240/(π*a)*sqrt(1 - (b_1/a)^2) → 1240*sqrt(1 - 1.96/a^2)/(π*a) solve, a → [-1.4; 1.4]
q1(a) := 32*d/da(q(a)*(27 - q(a) - 3*ω^2))  # error: Эта переменная не определена.
