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α_1 := 3
α_2 := 1
N_z := 6
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K := α_2*N_z + 10*α_1 = 36
j := sqrt(-1)
(2.187e18*p^2 + 4.5e21*p + 3.125e22)/(2.187e18*p^2 + 4.56e21*p + 3.125e22)
W1_0(p) := K/(p^2 + 0.1*K*p + 2*K) simplify → 36.0/(p^2 + 3.6*p + 72.0)
0.36/(p*(0.1*p^2 + 0.2*p + 1))
W1(p) := 1 - 19.44*10^-4*p/(69.984*10^-6*p^2 + 11.0592*10^-2*p + 1)
# 1) метод Рауса | просто приклад з теорії
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# Умова стійкості Рауса формується так: для того, щоб система автоматичного регулювання була стійкою, необхідно і достатньо, щоби коефіцієнти першої колонки таблиці Рауса мали однакові знаки, тобто при a_n>0 були додатними:
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# (передаточна функція замкненої системи)
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Wclose(p) == W1(p)/(1 + W1_0(p)*W1(p))
W1(p)/(1 + W1_0(p)*W1(p)) simplify; float, 6 → (163218.0*p + 19949.9*p^2 + 1556.07*p^3 + 1.0*p^4 + 1028810)/((p + 1571.15)*(p + 9.13147)*(3.56353*p + p^2 + 107.564))
A(p) := p^4 + 1583.85*p^3 + 20085.87*p^2 + 221107*p + 1500000
Wclose(p) := W1(p)/(1 + W1_0(p)*W1(p)) simplify; float, 10 → (163218.1069*p + 19949.86739*p^2 + 1556.069501*p^3 + 1.0*p^4 + 1028806.583)/((p + 1571.152)*(p + 9.131465998)*(3.563526*p + p^2 + 107.5638117))
a_4 := 1
a_2 := 20085.87
a_0. := 1500000
a_3 := 1583.85
a_1 := 221107
0
(p + 1571.15191896)*(p + 9.13146666746)*(p^2 + 3.56352795103*p + 107.563834494) simplify → p^4 + 1583.84691358*p^3 + 20085.8692273*p^2 + 221106.995885*p + 1543209.87654
r_3 := a_4/a_3 simplify; float, 2 → 0.00063
p^4 + 1583.84691358*p^3 + 20085.8692273*p^2 + 221106.995885*p + 1543209.87654 float, 6; collect → p^4 + 1583.85*p^3 + 20085.9*p^2 + 221107.0*p + 1543210
c_13 := a_2 - r_3*a_1 simplify; float, 7 → 19946.57
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c_23 := a_0. - r_3*0 simplify; float, 7 → 1500000
r_4 := a_3/c_13 simplify; float, 3 → 0.0794
c_14 := a_1 - r_4*c_23 simplify → 102007.0
r_5 := c_13/c_14 simplify; float, 3 → 0.196
c_15 := c_23 - r_5*0 simplify → 1500000
# 2) Критерії стійкості Гурвіца
# Критерій стійкості Гурвіца: для того щоби система автоматичного керування була стійка, необхідно і достатньо, щоб усі визначники Гурвіца мали знаки, однакові зі знаком старшого коефіцієнта характеристичного рівняння a_n, тобто при a_n>0 були додатними
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Δ4 := [a_3, a_1, 0, 0; a_4, a_2, a_0., 0; 0, a_3, a_1, 0; 0, a_4, a_2, a_0.] → [1583.85, 221107, 0, 0; 1, 20085.87, 1500000, 0; 0, 1583.85, 221107, 0; 0, 1, 20085.87, 1500000]
Δ1 := 1583.85
Δ2 := det([1583.85, 221107; 1, 20085.87]) float, 3 → 31600000
Δ3 := det([1583.85, 221107, 0; 1, 20085.87, 1500000; 0, 1583.85, 221107]) float, 3 → 3.22e12
|Δ4| float, 3 → 4.83e18
# --------------------------------------------------------------------------------------------------------------------------------------------------------
___________________________________________________________________
# 3) Критерій стійкості Михайлова
M(start, stop, step) :=
    x ← start
    s ← 0
    step_local ← step
    max_arr ← stop
    while x ≤ max_arr
        arr[s] ← x
        x ← x + step_local
        s ← s + 1
    arr  # 15 | 215
A(p) collect → p^4 + 1583.85*p^3 + 20085.87*p^2 + 221107*p + 1500000
A(j*ω) simplify; collect → ω^4 - 20085.87*ω^2 + 1500000 - 1583.85i*ω^3 + 221107.0i*ω
P(ω) := ω^4 - 20085.87*ω^2 + 1500000
w := M(0, 15, 0.1) = [
    0; 0.1; 0.2; 0.3; 0.4; 0.5; 0.6; 0.7; 0.8; 0.9
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]
Q(ω) := -1583.85*ω^3 + 221107.0*ω
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Q(w) = [
    0; 22109.1; 44208.7; 66289.3; 88341.4; 110356; 132322; 154232; 176075; 197842
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]
P(w) = [
    1500000; 1499799; 1499197; 1498192; 1496786; 1494979; 1492769; 1490158; 1487145; 1483731
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]
w := □  # error: Пустой местозаполнитель.
# годограф проходе через чотири квадранта
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# Сформулюємо критерій стійкості Михайлова: для того щоби лінійна система автоматичного керування, що має характеристичне рівняння n-го порядку, була стійкою, необхідно і достатньо, щоби при зміні ω від 0 до ∞ повна зміна аргументу вектора A( jω) повинна дорівнювати n(π/2) , де n - степінь характеристичного рівняння.
# 4) Критерій стійкості Найквіста
j → 1i  # із замкнутої системи робимо розімкнену
p*(0.1*p^2 + 0.2*p + 1) solve → [0; -1.0 - 3.0i; -1.0 + 3.0i]
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W4(p) := 0.36/(p*(0.1*p^2 + 0.2*p + 1))
W4_0(p) := 1
Wopen(p) := W4(p)*W4_0(p) simplify → 3.6/(p*(p^2 + 2.0*p + 10.0))
5.0*ω^5 - 80.0*ω^3 + 500.0*ω solve → [0; -3.0 - 1.0i; -3.0 + 1.0i; 3.0 - 1.0i; 3.0 + 1.0i]
ARR4 := M(0.1, 10, 0.1) = [
    0.1; 0.2; 0.3; 0.4; 0.5; 0.6; 0.7; 0.8; 0.9; 1
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]
Wopen(j*ω) simplify; collect → -(36.0*ω - 18.0i*ω^2 + 180.0i)/(5.0*ω^5 - 80.0*ω^3 + 500.0*ω)
U(ω) := -36.0*ω/(5.0*ω^5 - 80.0*ω^3 + 500.0*ω)
V(ω) := -(-18.0*ω^2 + 180.0)/(5.0*ω^5 - 80.0*ω^3 + 500.0*ω)
W4(p)/(1 + W4_0(p)*W4(p)) simplify; collect → -(6.31088724177e19*p - 1.8e49)/(5e48*p^3 + 1e49*p^2 + 5e49*p + 1.8e49)
ω := 0, 0.1 .. 10
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5e48*p^3 + 1e49*p^2 + 5e49*p + 1.8e49 solve; float, 3 → [-0.384; -0.808 - 2.95i; -0.808 + 2.95i]
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# Годограф W (jω) не охоплює точку (-1; j0) на дійсній вісі.
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# 5) Використання логарифмічних частотних характеристик для дослідження стійкості замкнутих систем
W4(p) → 0.36/(p*(0.2*p + 0.1*p^2 + 1))
W5_0(p) := K → 36
W5open(p) := W4(p)*W5_0(p) simplify → 129.6/(p*(p^2 + 2.0*p + 10.0))
# Логарифмічне АЧХ (Amplitude-frequency characteristic)
W5open(j*ω) simplify; collect → -(1296.0*ω - 648.0i*ω^2 + 6480.0i)/(5.0*ω^5 - 80.0*ω^3 + 500.0*ω)
W1_AFC(p) := 129.6
W1_AFC(j*ω) simplify → 129.6
W2_AFC(p) := 1/p
W2_AFC(j*ω) simplify → -1i/ω
U5(ω) := -1296.0*ω/(5.0*ω^5 - 80.0*ω^3 + 500.0*ω)
V5(ω) := -(-648.0i*ω^2 + 6480.0i)/(5.0*ω^5 - 80.0*ω^3 + 500.0*ω)
W3_AFC(p) := 1/(p^2 + 2*p + 10)
WW(ω) := sqrt(U5(ω)^2 + V5(ω)^2) simplify → sqrt(-1.0*(419904.0*ω^4 - 10077696*ω^2 + 41990400)/(25.0*ω^10 - 800.0*ω^8 + 11400.0*ω^6 - 80000.0*ω^4 + 250000.0*ω^2))
W3_AFC(j*ω) simplify; collect → -(ω^2 - 10 + 2i*ω)/(ω^4 - 16*ω^2 + 100)
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L(ω) := 20*log(129.6) + 20*log(1/ω) + 20*log(10.0*1/sqrt(ω^4 - 16.0*ω^2 + 100.0))
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# Логарифмічне ФЧХ (Phase-frequency characteristic)
W1_PFC(p) := 129.6
W1_PFC(j*ω) simplify → 129.6
W2_PFC(p) := 1/p
W2_PFC(j*ω) simplify → -1i/ω
W3_PFC(p) := 1/(p^2 + 2*p + 10)
W3_PFC(j*ω) simplify; collect → -(ω^2 - 10 + 2i*ω)/(ω^4 - 16*ω^2 + 100)
φ1_PFC(ω) := 0
φ2_PFC(ω) := -π/2
φ3_PFC(ω) := atan(-2*ω/(-ω^2 + 10.0)) simplify; collect → atan(2.0*ω/(ω^2 - 10.0))
atan(2.0*ω/(ω^2 - 10.0)) if ω ≥ sqrt(10)
π + atan(2.0*ω/(ω^2 - 10.0)) if ω < sqrt(10)
φ4_PFC(ω) :=
    φ3_PFC(ω) if U(ω) ≥ 0
    π + φ3_PFC(ω) if U(ω) < 0 and V(ω) ≥ 0
    -(π + φ3_PFC(ω)) if U(ω) < 0 and V(ω) < 0
Φ(ω) := φ1_PFC(ω) + φ2_PFC(ω) + φ4_PFC(ω)
atan(0) = 0
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fi(ω) := -π/2 + π - atan(10*ω) - atan(0.1*ω)
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