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α_1 := 3
α_2 := 1
N_z := 6
K := α_2*N_z + 10*α_1 = 36
j := sqrt(-1)
a_3 := 0
a_2 := 4
a_1 := K = 36
a_0. := 6
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g(m*T) == 4*m*T
4*m*T == a_3*x*((m + 3)*T) + a_2*x*((m + 2)*T) + a_1*x*((m + 1)*T) + a_0.*x*(m*T) → 4*T*m == 6*T*m*x + 36*T*x*(m + 1) + 4*T*x*(m + 2)
4*T*m == 6*T*m*x + 36*T*x*(m + 1) + 4*T*x*(m + 2)
# Т-період квантування
# m-номер періоду
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X(p) := 4*T*e^(p*T)/((e^(p*T) - 1)^2*(4*e^(2*p*T) + 36*e^(p*T) + 6))
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(z - 1)^2*(4*z^2 + 36*z + 6) solve → [1; 1; 5*sqrt(3)/2 - 9/2; -5*sqrt(3)/2 - 9/2]
5*sqrt(3)/2 - 9/2 = -0.169873
(z - 1)^2*(4*z^2 + 36*z + 6) simplify; collect → 4*z^4 + 28*z^3 - 62*z^2 + 24*z + 6
(5*sqrt(3) - sqrt(3^4))/2 → 5*sqrt(3)/2 - 9/2
3^4 → 81
-5*sqrt(3)/2 - 9/2 = -8.83013
j = 1i
# Для кратного полюса
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d/dz((z - 1)^2*(4*z^2 + 36*z + 6)) → (2*z - 2)*(4*z^2 + 36*z + 6) + (z - 1)^2*(8*z + 36)
(2*z - 2)*(4*z^2 + 36*z + 6) + (z - 1)^2*(8*z + 36) simplify → 4*(z - 1)*(4*z^2 + 25*z - 6)
A(z) := 4*(z - 1)*(4*z^2 + 25*z - 6) simplify; collect → 16*z^3 + 84*z^2 - 124*z + 24
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4*T*z^m/(4*z^2 + 36*z + 6)
d/dz(4*T*z^m/(4*z^2 + 36*z + 6)) simplify → 2*T*(18*m*z^m - 4*z*z^m - 18*z^m + 2*m*z*z^m + 3*m*z^m/z)/(2*z^2 + 18*z + 3)^2 substitute, z == 1 → 2*T*m/23 - 44*T/529
d/dz(4*T*z^m) simplify → 4*T*m*z^(m - 1)
d/dz(4*z^2 + 36*z + 6) simplify → 8*z + 36
(4*T*m*z^(m - 1)*(4*z^2 + 36*z + 6) - 4*T*z^m*(8*z + 36))/(4*z^2 + 36*z + 6)^2 simplify → -(T*z^m*(8*z + 36) - T*m*z^(m - 1)*(4*z^2 + 36*z + 6))/(2*z^2 + 18*z + 3)^2
d/dz(4*T*z^m/(4*z^2 + 36*z + 6)) simplify; substitute, z == 1 → 2*T*m/23 - 44*T/529
-(T*z^m*(8*z + 36) - T*m*z^(m - 1)*(4*z^2 + 36*z + 6))/(2*z^2 + 18*z + 3)^2 substitute, z == 1 → 2*T*m/23 - 44*T/529
sum(k, k = 1 .. 3) = 6
# Для простих полюсів
(z - 1)*(z^3 + 4*z^2 + 175*z) == 0 solve → [0; 1; -2 + 3i*sqrt(19); -2 - 3i*sqrt(19)]
4*T*z^m/(16*z^3 + 84*z^2 - 124*z + 24) substitute, z == 5*sqrt(3)/2 - 9/2 → 4*T*(5*sqrt(3)/2 - 9/2)^m/(980*sqrt(3) - 1650)
(z - 1)*(z^3 + 4*z^2 + 175*z) simplify; collect → z^4 + 3*z^3 + 171*z^2 - 175*z
4*T*z^m/(16*z^3 + 84*z^2 - 124*z + 24) substitute, z == -5*sqrt(3)/2 - 9/2 → -4*T*(-5*sqrt(3)/2 - 9/2)^m/(980*sqrt(3) + 1650)
d/dz((z - 1)*(z^3 + 4*z^2 + 175*z)) simplify → 4*z^3 + 9*z^2 + 342*z - 175
4*z^3 + 9*z^2 + 342*z - 175 substitute, z == -2 - 3i*sqrt(19) → 1710 + 990i*sqrt(19)
