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α_1 := 3
α_2 := 1
N_z := 6
K := α_2*N_z + 10*α_1 = 36
j := sqrt(-1)
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W_1(p) := 10/p
W_2(p) := 1/(p + K) → 1/(p + 36)
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W(p) := W_1(p)/(1 + W_1(p)*W_2(p)) → 10/(p*(10/(p*(p + 36)) + 1)) collect → (10*p + 360)/(p^2 + 36*p + 10)
# Для замкненої імпульсної системи (рис.74) рівняння мають вигляд
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X(p) == ξ_star(p)*W(p)
ξ(p) == G(p) - X(p)
# Підставляючи перше рівняння в друге, отримаємо
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ξ(p) == G(p) - ξ_star(p)*W(p)
# Скориставшись властивостями лінійності і множення зображень
# неперервної і решіткової функцій D -перетворення, отримаємо
# D{ξ(p)} = D{G(p) - D{ξstar(p)*W(p)}}
p^2 + 36*p + 10 solve → [sqrt(314) - 18; -sqrt(314) - 18] float, 5 → [-0.27995; -35.72]
d/dp(p^2 + 36*p + 10) → 2*p + 36
(10*p + 360)/(2*p + 36) substitute, p == sqrt(314) - 18 → 45*sqrt(2)*sqrt(157)/157 + 5 float, 3 → 10.1
10.1*e^(p*t)/(e^(p*t) - e^(-0.28*t)) + (-0.079*e^(p*t)/(e^(p*t) - e^(-35.7*t)))
3500*e^(p*T)/(e^(p*T) - 1)
(10*p + 360)/(2*p + 36) substitute, p == -sqrt(314) - 18 → 5 - 45*sqrt(2)*sqrt(157)/157 float, 3 → -0.079
W_close.(p) := 3500*e^(p*T)/(e^(p*T) - 1)/(1 + 3500*e^(p*T)/(e^(p*T) - 1)) simplify → 3500/(3501*(3501*e^(T*p) - 1)) + 3500/3501
W_close(p) := (10.1*e^(p*T)/(e^(p*T) - e^(-0.28*T)) + (-0.079*e^(p*T)/(e^(p*T) - e^(-35.7*T))))/(1 + (10.1*e^(p*T)/(e^(p*T) - e^(-0.28*T)) + (-0.079*e^(p*T)/(e^(p*T) - e^(-35.7*T))))) simplify → (10021.0*e^(2.0*T*p) - 10100.0*e^(T*p)*e^(-35.7*T) + 79.0*e^(T*p)*e^(-0.28*T))/(11021.0*e^(2.0*T*p) + 1000.0*e^(-35.98*T) - 11100.0*e^(T*p)*e^(-35.7*T) - 921.0*e^(T*p)*e^(-0.28*T))  # error: Значение имеет единицы измерения: плотность магнитного потока, а должно иметь единицы измерения: Unitless.
p^2 + 36*p + 10 solve → [sqrt(314) - 18; -sqrt(314) - 18] float, 5 → [-0.27995; -35.72]
p(p - 10) solve → 0
W_close(p) simplify → (10021.0*e^(2.0*T*p) - 10100.0*e^(T*p)*e^(-35.7*T) + 79.0*e^(T*p)*e^(-0.28*T))/(11021.0*e^(2.0*T*p) + 1000.0*e^(-35.98*T) - 11100.0*e^(T*p)*e^(-35.7*T) - 921.0*e^(T*p)*e^(-0.28*T))
(10.1*e^(p*T)/(e^(p*T) - e^(-0.28*T)) + (-0.079*e^(p*T)/(e^(p*T) - e^(-35.7*T))))/(1 + (10.1*e^(p*T)/(e^(p*T) - e^(-0.28*T)) + (-0.079*e^(p*T)/(e^(p*T) - e^(-35.7*T))))) simplify → (10021.0*e^(2.0*T*p) - 10100.0*e^(T*p)*e^(-35.7*T) + 79.0*e^(T*p)*e^(-0.28*T))/(11021.0*e^(2.0*T*p) + 1000.0*e^(-35.98*T) - 11100.0*e^(T*p)*e^(-35.7*T) - 921.0*e^(T*p)*e^(-0.28*T))
(10.1*e^(p*T)*(e^(p*T) - e^(-35.7*T)) - 0.079*e^(p*T)*(e^(p*T) - e^(-0.28*T)))/((e^(p*T) - e^(-0.28*T))*(e^(p*T) - e^(-35.7*T)) + (10.1*e^(p*T)*(e^(p*T) - e^(-35.7*T)) - 0.079*e^(p*T)*(e^(p*T) - e^(-0.28*T)))) simplify → (10021.0*e^(2.0*T*p) - 10100.0*e^(T*p)*e^(-35.7*T) + 79.0*e^(T*p)*e^(-0.28*T))/(11021.0*e^(2.0*T*p) + 1000.0*e^(-35.98*T) - 11100.0*e^(T*p)*e^(-35.7*T) - 921.0*e^(T*p)*e^(-0.28*T))
10.1*e^(p*T)*(e^(p*T) - e^(-35.7*T)) - 0.079*e^(p*T)*(e^(p*T) - e^(-0.28*T)) simplify → 10.021*e^(2.0*T*p) - 10.1*e^(T*(p - 35.7)) + 0.079*e^(T*(p - 0.28))
(e^(p*T) - e^(-0.28*T))*(e^(p*T) - e^(-35.7*T)) + (10.1*e^(p*T)*(e^(p*T) - e^(-35.7*T)) - 0.079*e^(p*T)*(e^(p*T) - e^(-0.28*T))) simplify → 11.021*e^(2.0*T*p) - 11.1*e^(T*(p - 35.7)) - 0.921*e^(T*(p - 0.28)) + e^(-35.98*T)
(10.021*e^(2.0*T*p) - 10.1*e^(T*(p - 35.7)) + 0.079*e^(T*(p - 0.28)))/(11.021*e^(2.0*T*p) - 11.1*e^(T*(p - 35.7)) - 0.921*e^(T*(p - 0.28)) + e^(-35.98*T)) simplify → (10021.0*e^(2.0*T*p) - 10100.0*e^(T*p)*e^(-35.7*T) + 79.0*e^(T*p)*e^(-0.28*T))/(11021.0*e^(2.0*T*p) + 1000.0*e^(-35.98*T) - 11100.0*e^(T*p)*e^(-35.7*T) - 921.0*e^(T*p)*e^(-0.28*T))
(10.1*e^(p*T)/(e^(p*T) - e^(-0.28*T)) + (-0.079*e^(p*T)/(e^(p*T) - e^(-35.7*T))))/(1 + (10.1*e^(p*T)/(e^(p*T) - e^(-0.28*T)) + (-0.079*e^(p*T)/(e^(p*T) - e^(-35.7*T)))))
10.1*e^(p*T)/(e^(p*T) - e^(-0.28*T)) + (-0.079*e^(p*T)/(e^(p*T) - e^(-35.7*T))) simplify; rectangular → e^(T*p)*(10021.0*e^(T*p) - 10100.0*e^(-35.7*T) + 79.0*e^(-0.28*T))/(1000.0*e^(2*T*p) - 1000.0*e^(T*(p - 35.7)) - 1000.0*e^(T*(p - 0.28)) + 1000.0*e^(-35.98*T))
1 + (10.1*e^(p*T)/(e^(p*T) - e^(-0.28*T)) + (-0.079*e^(p*T)/(e^(p*T) - e^(-35.7*T)))) simplify; rectangular → -(11100.0*e^(T*(p - 35.7)) - 11021.0*e^(2.0*T*p) + 921.0*e^(T*(p - 0.28)) - 1000.0*e^(-35.98*T))/(1000.0*e^(2.0*T*p) - 1000.0*e^(T*p - 35.7*T) - 1000.0*e^(T*p - 0.28*T) + 1000.0*e^(-35.98*T))
10.1*e^(p*T)/(e^(p*T) - e^(-0.28*T)) + (-0.079*e^(p*T)/(e^(p*T) - e^(-35.7*T))) float, 3; factor → (10021.0*e^(2.0*T*p) + (-10100.0*e^(T*p)*e^(-35.7*T)) + 79.0*e^(T*p)*e^(-0.28*T))/(1000*(e^(2.0*T*p) + (-1.0*e^(T*p)*e^(-35.7*T)) + (-1.0*e^(T*p)*e^(-0.28*T)) + e^(-35.7*T)*e^(-0.28*T)))
