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α_1 := 3
α_2 := 1
N_z := 6
K := α_2*N_z + 10*α_1 = 36
j := sqrt(-1)
W_3_star(p) := (10.1*e^(p*T)/(e^(p*T) - e^(-0.28*T)) + (-0.079*e^(p*T)/(e^(p*T) - e^(-35.7*T))))/(1 + (10.1*e^(p*T)/(e^(p*T) - e^(-0.28*T)) + (-0.079*e^(p*T)/(e^(p*T) - e^(-35.7*T)))))  # error: Значение имеет единицы измерения: плотность магнитного потока, а должно иметь единицы измерения: Unitless.
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W_3_star(p) simplify → (10021.0*e^(2.0*T*p) - 10100.0*e^(T*p)*e^(-35.7*T) + 79.0*e^(T*p)*e^(-0.28*T))/(11021.0*e^(2.0*T*p) + 1000.0*e^(-35.98*T) - 11100.0*e^(T*p)*e^(-35.7*T) - 921.0*e^(T*p)*e^(-0.28*T))
T := 0.1
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a_0. := 5
a_1 := K + 20 = 56
a_2 := 0.1*K = 3.6
K_1 := 30
A := 15
b := 0.1*K = 3.6
a_3 := 40
a_4 := 10
# 1)Аналог критерія Гурвіца
# Імпульсна система буде стійкою, якщо при A_n > 0 всі головні діагональні визначники додатні
W_3_star(p) substitute, p*T == pT; simplify; substitute, T == 0.1; float, 3 → -1.0*(-505000.0*e^(pT - 3.57) + 3950.0*e^(pT - 0.028) + 501000.0*e^(2.0*pT))/(555000.0*e^(pT - 3.57) + 46050.0*e^(pT - 0.028) + (-551000.0*e^(2.0*pT)) - 1369.0) simplify; float, 3; substitute, pT == p*T → (501000.0*e^(2.0*T*p) + (-10380.0*e^(T*p)))/(551000.0*e^(2.0*T*p) + (-60400.0*e^(T*p)) + 1369.0)
W_3_star(p) == (501000.0*e^(2.0*p*T) - 10377.0*e^(p*T))/(551000.0*e^(2.0*T*p) + (-60400.0*e^(T*p)) + 1369.0)
A1p_star(p) := 551000.0*e^(2.0*p*T) - 60404.0*e^(p*T) + 1369.0
e^(p*T) == z solve, p → ln(z)/T
(e^(p*T) == z)
e^(p*T) == (u + 1)/(u - 1) solve, p → ln((u + 1)/(u - 1))/T
A1z_star(z) := A1p_star(ln(z)/T) simplify; collect → 551000.0*z^2 - 60404.0*z + 1369.0
z == (u + 1)/(u - 1)  # - ще одна заміна
A1u_star(u) := (u - 1.0)^2*A1z_star((u + 1)/(u - 1)) simplify → 491965.0*u^2 + 1099262*u + 612773.0 float, 3; collect → 491965.0*u^2 + 1100000*u + 612773.0
Δ2 := [1100000, 0; 491965.0, 612773.0]
|Δ2| float, 3 → 674000000000
Δ1 := 1100000
A_2 := 491965.0
# то керуючись критерієм Гурвіца  можна зробити висновок  про те, що дана імпульсна  система  стійка.
# 2)Аналог критерія Рауса
# Замкнена імпульсна система буде стійкою якщо всі нулі характеристичного багаточлена A^(*)(z) розташовані усередині кола одиничного радіуса, тобто якщо всі нулі A^(*)(z) за модулем менше одиниці.
# Характеристичний многочлен:
A2_star(p) := a_4*e^(4*p*T) + a_3*e^(3*p*T) + a_2*e^(2*p*T) + a_1*e^(p*T) + a_0.
A2_star(p) simplify → 56.0*e^(T*p) + 3.6*e^(2*T*p) + 40.0*e^(3*T*p) + 10.0*e^(4*T*p) + 5.0
a_3 → 40
a_0. → 5
a_1 → 56
a_2 → 3.6
a_4 → 10
a_1 → 56
a_4 → 10
a_3 → 40
a_2 → 3.6
a_0. → 5
λ_1 := a_0./a_4 → 1/2
c_02 := a_1 - λ_1*a_3 → 36
c_12 := a_2 - λ_1*a_2 → 1.8
c_22 := a_3 - λ_1*a_1 → 12
c_32 := a_4 - λ_1*a_0. → 15/2
0
c_32 → 15/2
c_22 → 12
c_12 → 1.8
c_02 → 36
0
# ______________________________________________________________________________________________________________________________________________________________________
λ_2 := c_02/c_32 float, 3 → 4.8
c_03 := c_12 - λ_2*c_22 → -55.8
c_13 := c_22 - λ_2*c_12 → 3.36
c_23 := c_32 - λ_2*c_02 → -165.3
0
0
c_23 → -165.3
c_13 → 3.36
0
c_03 → -55.8
0
# _____________________________________________________________________________________________________________________________________________________________________
λ_3 := c_03/c_23 float, 3 → 0.338
c_04 := c_13 - λ_3*c_13 → 2.22432
c_14 := c_23 - λ_3*c_03 float, 5 → -146.44
0
0
0
0
0
c_14 → -146.44
c_04 → 2.22432
0
# _____________________________________________________________________________________________________________________________________________________________________
λ_4 := c_04/c_14 float, 3 → -0.0152
0
0
c_05 := c_14 - λ_4*c_04 float, 5 → -146.41
0
0
# 0 | 0 | 0 | 0
c_05 → -146.41
# _____________________________________________________________________________________________________________________________________________________________________
# Так як |λ_1|<1, |λ_2|>1, |λ_3|<1, |λ_4|<1  робимо висновок, що данна замкнута система не стійка.
# 3)Аналог критерія Михайлова
# Для того, щоби імпульсна система була стійка необхідно і достатньо, щоби при зміні частоти ω від 0 до π/T вектор кривої A*( jω) проходив проти годинникової стрілки 2n квадрантів (де n - степінь характеристичного багаточлена).
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# dash = тире
W_1(p) := K_1/((p + A)*(p + b)) → 30/((p + 3.6)*(p + 15))
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p_1 := 0
p_2 := -15
p_3 := -3.6
p*(p + 3.6)*(p + 15) simplify; collect → p^3 + 18.6*p^2 + 54.0*p
p*(p + 3.6)*(p + 15) solve → [0; -15; -3.6]
d/dp(p*(p + 3.6)*(p + 15)) → p*(p + 3.6) + p*(p + 15) + (p + 3.6)*(p + 15) simplify → 3.0*p^2 + 37.2*p + 54.0
1/(3.0*p_1^2 + 37.2*p_1 + 54.0)*e^(p*T)/(e^(p*T) - e^(p_1*T)) + 1/(3.0*p_2^2 + 37.2*p_2 + 54.0)*e^(p*T)/(e^(p*T) - e^(p_2*T)) + 1/(3.0*p_3^2 + 37.2*p_3 + 54.0)*e^(p*T)/(e^(p*T) - e^(p_3*T)) float, 3 → 0.0185*e^(T*p)/(e^(T*p) - 1.0) + 0.0244*e^(T*p)/(e^(-3.6*T) + (-1.0*e^(T*p))) - 0.00585*e^(T*p)/(e^(-15.0*T) + (-1.0*e^(T*p)))
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# =
30*(1 - e^(-p*T))*(0.0185*e^(T*p)/(e^(T*p) - 1.0) + 0.0244*e^(T*p)/(e^(-3.6*T) + (-1.0*e^(T*p))) - 0.00585*e^(T*p)/(e^(-15.0*T) + (-1.0*e^(T*p))))
30*(1 - e^(-p*T))*(0.0185*e^(T*p)/(e^(T*p) - 1.0) + 0.0244*e^(T*p)/(e^(-3.6*T) + (-1.0*e^(T*p))) - 0.00585*e^(T*p)/(e^(-15.0*T) + (-1.0*e^(T*p)))) substitute, p*T == pT; substitute, T == 0.1; float, 3; collect → 1.0*(17700.0*e^(pT - 1.5) + (-73050.0*e^(pT - 0.36)) + (-150.0*e^(2.0*pT)) + 55650.0*e^pT + 4551.0)/(100000.0*e^(2.0*pT) + (-100000.0*e^(pT - 1.5)) + (-100000.0*e^(pT - 0.36)) + 15560.0)
W3_3_star(p) := (17700.0*e^(pT - 1.5) - 73050.0*e^(pT - 0.36) - 150.0*e^(2.0*pT) + 55650.0*e^pT + 4551.0)/(100000.0*e^(2.0*pT) - 100000.0*e^(pT - 1.5) - 100000.0*e^(pT - 0.36) + 15560.0)/(1 + (17700.0*e^(pT - 1.5) - 73050.0*e^(pT - 0.36) - 150.0*e^(2.0*pT) + 55650.0*e^pT + 4551.0)/(100000.0*e^(2.0*pT) - 100000.0*e^(pT - 1.5) - 100000.0*e^(pT - 0.36) + 15560.0)) simplify; float, 3 → (-150.0*e^(2.0*pT) + 8634.0*e^pT + 4551.0)/(99850.0*e^(2.0*pT) + (-83410.0*e^pT) + 20110.0)  # error: Эта переменная не определена.
A3p_star(p) := 99850.0*e^(2.0*p*T) - 83410.0*e^(p*T) + 20110.0
A3p_star(j*ω) simplify; rectangular → 99850.0*cos(2.0*T*ω) - 83410.0*cos(T*ω) + 20110.0 + (99850.0*sin(2.0*T*ω) - 83410.0*sin(T*ω))*1i substitute, T == 0.1 → 99850.0*cos(0.2*ω) - 83410.0*cos(0.1*ω) + 20110.0 - 83410.0i*sin(0.1*ω) + 99850.0i*sin(0.2*ω)
P(ω) := 99850.0*cos(0.2*ω) - 83410.0*cos(0.1*ω) + 20110.0
Q(ω) := -83410.0*sin(0.1*ω) + 99850.0*sin(0.2*ω)
ω := 0, 0.01 .. π/T → 0, 0.01 .. 31.4159265359
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w1 := 0, 0.01 .. 2*π → 0, 0.01 .. 2*π
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# система стійка
# Проміжні розрахунки(без конкретики)
1/(3.0*p_3^2 + 37.2*p_3 + 54.0) simplify; float, 3 → -0.0244
1/(3.0*(-15)^2 + 37.2*(-15) + 54.0) simplify; float, 3 → 0.00585
e^(p*T)/(e^(p*T) - e^(p_2*T)) simplify → -e^(T*p)/(e^(-15*T) - e^(T*p))
1/(3.0*p_2^2 + 37.2*p_2 + 54.0)*e^(p*T)/(e^(p*T) - e^(p_2*T)) float, 3 → -0.00585*e^(T*p)/(e^(-15.0*T) + (-1.0*e^(T*p)))
30*(1 - e^(-p*T))*(0.0185*e^(T*p)/(e^(T*p) - 1.0) + 0.0244*e^(T*p)/(e^(-3.6*T) + (-1.0*e^(T*p))) - 0.00585*e^(T*p)/(e^(-15.0*T) + (-1.0*e^(T*p))))
30*(1 - e^(-p*T))*(0.0185*e^(p*T)/(e^(p*T) - 1.0) + (-0.0244*e^(p*T)/(e^(p*T) - e^(-3.6*T))) + 0.00585*e^(p*T)/(e^(p*T) - e^(-15*T)))
(e^(p*T) - 1.0)*(e^(p*T) - e^(-3.6*T))*(e^(p*T) - e^(-15*T)) simplify → (e^(-3.6*T) - e^(T*p))*(e^(-15*T) - e^(T*p))*(e^(T*p) - 1.0)
30*(1 - e^(-pT))*((e^pT - e^(-3.6*T))*(e^pT - e^(-15*T))*0.0185*e^pT + (e^pT - 1.0)*(e^pT - e^(-15*T))*(-0.0244*e^pT) + (e^pT - 1.0)*(e^pT - e^(-3.6*T))*0.00585*e^pT)/((e^pT - 1.0)*(e^pT - e^(-3.6*T))*(e^pT - e^(-15*T))) substitute, T == 0.1; rectangular; float, 3 → (-1927.0*e^(2.0*pT) + 110900.0*e^pT + 58470.0)/(1280000*e^(2.0*pT) + (-1180000*e^pT) + 200000.0)
(-1927.0*e^(2.0*pT) + 110900.0*e^pT + 58470.0)/(1280000*e^(2.0*pT) + (-1180000*e^pT) + 200000.0)/(1 + (-1927.0*e^(2.0*pT) + 110900.0*e^pT + 58470.0)/(1280000*e^(2.0*pT) + (-1180000*e^pT) + 200000.0)) simplify; collect; float, 3 → (2613.0*e^(2.0*pT) + 1706.0)/(25560.0*e^(2.0*pT) + (-21380.0*e^pT) + 5170.0) - 0.104 rectangular → (55588.0*e^pT - 1131.0*e^(2.0*pT) + 29208.0)/(639000.0*e^(2.0*pT) - 534500.0*e^pT + 129250.0)
30*(1 - e^(-pT))*(0.0185*e^pT/(e^pT - 1.0) + (-0.0244*e^pT/(e^pT - e^(-3.6*0.1))) + 0.00585*e^pT/(e^pT - e^(-15*0.1))) simplify; float, 3; rectangular → (-15000.0*e^(2.0*pT) + 863515.0*e^pT + 455066.0)/(10000000*e^(2.0*pT) + (-9210000*e^pT) + 1560000)
30*(1 - e^(-pT))*0.0185*e^pT/(e^pT - 1.0) simplify → 0.555
30*(1 - e^(-pT))*(-0.0244*e^pT/(e^pT - e^(-3.6*0.1))) simplify; float, 3 → 2212.0/(10000.0*e^pT - 6977.0) - 0.732
30*(1 - e^(-pT))*0.00585*e^pT/(e^pT - e^(-15*0.1)) simplify; float, 3 → 0.175 - 1363.0/(10000.0*e^pT - 2231.0)
0.555 + (2212.0/(10000.0*e^pT - 6977.0) - 0.732) + (0.175 - 1363.0/(10000.0*e^pT - 2231.0)) simplify; rectangular; collect; float, 3 →  # no stored result
(-50000.0*e^(2.0*pT) + 2170000*e^pT + 1140000)/(25000000*e^(2.0*pT) + (-23000000*e^pT) + 3890000)/(1 + (-50000.0*e^(2.0*pT) + 2170000*e^pT + 1140000)/(25000000*e^(2.0*pT) + (-23000000*e^pT) + 3890000)) simplify; rectangular; float, 3 → (-25395.0*e^(2.0*pT) + 1090000*e^pT + 569937.0)/(12500000*e^(2.0*pT) + (-10400000*e^pT) + 2510000)
(-25395.0*e^(2.0*pT) + 1090000*e^pT + 569937.0)/(12500000*e^(2.0*pT) + (-10400000*e^pT) + 2510000)
(12500000*e^(2.0*pT) + (-10400000*e^pT) + 2510000)/12500000 simplify → e^(2.0*pT) - 0.832*e^pT + 0.2008
(-25395.0*e^(2.0*pT) + 1090000*e^pT + 569937.0)/12500000 simplify; float, 3 → -0.00203*e^(2.0*pT) + 0.0872*e^pT + 0.0456
(-150.0*e^(2.0*pT) + 8634.0*e^pT + 4551.0)/(99850.0*e^(2.0*pT) + (-83410.0*e^pT) + 20110.0) == (-0.0015*e^(2.0*pT) + 0.0865*e^pT + 0.0456)/(e^(2.0*pT) + (-0.835*e^pT) + 0.201)
(99850.0*e^(2.0*pT) + (-83410.0*e^pT) + 20110.0)/99850.0 simplify; float, 3 → e^(2.0*pT) + (-0.835*e^pT) + 0.201
(-150.0*e^(2.0*pT) + 8634.0*e^pT + 4551.0)/99850.0 simplify; float, 3 → -0.0015*e^(2.0*pT) + 0.0865*e^pT + 0.0456
(55588.0*e^pT - 1131.0*e^(2.0*pT) + 29208.0)/(639000.0*e^(2.0*pT) - 534500.0*e^pT + 129250.0) == (-0.00177*e^(2.0*pT) + 0.087*e^pT + 0.0457)/(e^(2.0*pT) + (-0.836*e^pT) + 0.202)
(639000.0*e^(2.0*pT) - 534500.0*e^pT + 129250.0)/639000.0 simplify; float, 3 → e^(2.0*pT) + (-0.836*e^pT) + 0.202
(55588.0*e^pT - 1131.0*e^(2.0*pT) + 29208.0)/639000.0 simplify; float, 3 → -0.00177*e^(2.0*pT) + 0.087*e^pT + 0.0457
A33(p) := e^(2.0*p*T) - 0.835*e^(p*T) + 0.201
A33(j*w) simplify; rectangular → cos(2.0*T*w) - 0.835*cos(T*w) + 0.201 + (sin(2.0*T*w) - 0.835*sin(T*w))*1i
P33(w) := cos(2.0*0.1*w) - 0.835*cos(0.1*w) + 0.201
Q33(w) := sin(2.0*0.1*w) - 0.835*sin(0.1*w)
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