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α_1 := 3
α_2 := 1
N_z := 6
K := α_2*N_z + 10*α_1 = 36
j := sqrt(-1)
Φ_1(y_1, y_2, y_3) := 15*y_1 - e^y_2 + 2*cos(y_3) → 15*y_1 + 2*cos(y_3) - e^y_2
Φ_2(y_1, y_2, y_3) := y_1^2 - (K + 10)*y_2 - 0.3*y_3 → -0.3*y_3 - 46*y_2 + y_1^2
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Φ_3(y_1, y_2, y_3) := sin(y_1) - y_1*y_2 + 15*K*y_3 → 540*y_3 + sin(y_1) - y_1*y_2
d/dy_1(Φ_1(y_1, y_2, y_3)) → 15
d/dy_2(Φ_1(y_1, y_2, y_3)) → -e^y_2
d/dy_3(Φ_1(y_1, y_2, y_3)) → -2*sin(y_3)
d/dy_1(Φ_2(y_1, y_2, y_3)) → 2*y_1
d/dy_2(Φ_2(y_1, y_2, y_3)) → -46
d/dy_3(Φ_2(y_1, y_2, y_3)) → -0.3
d/dy_1(Φ_3(y_1, y_2, y_3)) → cos(y_1) - y_2
d/dy_2(Φ_3(y_1, y_2, y_3)) → -y_1
d/dy_3(Φ_3(y_1, y_2, y_3)) → 540
y_1 := 0
y_2 := 0
y_3 := 0
d/dy_1(Φ_1(y_1, y_2, y_3)) → 15
d/dy_1(Φ_2(y_1, y_2, y_3)) → 0
d/dy_1(Φ_3(y_1, y_2, y_3)) → 1
d/dy_2(Φ_1(y_1, y_2, y_3)) → -1
d/dy_2(Φ_2(y_1, y_2, y_3)) → -46
d/dy_2(Φ_3(y_1, y_2, y_3)) → 0
d/dy_3(Φ_1(y_1, y_2, y_3)) → 0
d/dy_3(Φ_2(y_1, y_2, y_3)) → -0.3
d/dy_3(Φ_3(y_1, y_2, y_3)) → 540
d/dt(y_1) == 15*y_1 - y_2 + 0
d/dt(y_2) == 0 - 46*y_2 - 0.3*y_3
# {
limit(x/x^x, x → ∞) simplify → 0
d/dt(y_3) == y_1 + 0 + 540*y_3
d/dx(x^x) → x*x^(x - 1) + x^x*ln(x)
A(p) := [15 - p, -1, 0; 0, -46 - p, -0.3; 1, 0, 540 - p]
|A(p)| → 509.0*p^2 - 1.0*p^3 + 17430.0*p - 372599.7 solve, p; float, 5 → [540.0; -46.0; 15.0]
(-p + 540)*(-p - 46)*(-p + 15) simplify; collect → 509*p^2 - p^3 + 17430*p - 372600
p_1 := 540
p_2 := -46
p_3 := 15
# Корені характеристичного рівняння мають позитивні дійсні частини, отже
# нелінійна система нестійка.
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W(p) := 10/(p*(p + 4)^2) collect → 10/(p^3 + 8*p^2 + 16*p)
N_z → 6
C := 15
W(j*ω) simplify → -10*(8*ω - ω^2*1i + 16i)/(ω*(ω^2 + 16)^2)
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10*(-j*ω + 4)^2/(j*ω*(j*ω + 4)^2*(-j*ω + 4)^2) collect; rectangular → -80/(ω^2 + 16)^2 + (10*ω^2 - 160)/(ω*(ω^2 + 16)^2)*1i
W(j*ω) simplify; collect → -(80*ω - 10i*ω^2 + 160i)/(ω^5 + 32*ω^3 + 256*ω) rectangular → -80/(ω^2 + 16)^2 + (10*ω^2 - 160)/(ω*(ω^2 + 16)^2)*1i
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U(ω) := -80/(ω^2 + 16)^2
U_m(ω) := U(ω) → -80/(ω^2 + 16)^2
15/0 == ∞
Φ(x) := 100000*x
V(ω) := (10*ω^2 - 160)/(ω*(ω^2 + 16)^2)
V_m(ω) := ω*V(ω) → (10*ω^2 - 160)/(ω^2 + 16)^2
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GG(p) := 3500*(100*p - 1)/(p^2*(0.01*p + 1))
GG(j*ω) simplify; collect; rectangular → -(35000000*ω^2 - 35000000)/(ω^2*(ω^2 + 10000.0)) - 3500350000/(ω^3 + 10000.0*ω)*1i
