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α_1 := 3
α_2 := 1
N_z := 6
K := α_2*N_z + 10*α_1 = 36
R_1 := 0.1*K = 3.6
R_2 := 200
C_1 := 5*K*10^-6 = 0.00018
C_2 := 15*K*10^-6 = 0.00054
G_1 := 1/R_1 = 0.277778
G_2 := 1/R_2 = 0.005
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# Т - подібний мостовий
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G1 := 1/R1
G2 := 1/R2
[G_1 + p*C_1, -p*C_1, -G_1; -p*C_1, G_2 + p*C_1 + p*C_2, -p*C_2; -G_1, -p*C_2, G_1 + p*C_2]
C_1*R_1 = 0.000648
C_2*R_2 = 0.108
Δ11 := (-1)^(1 + 1)*[G_2 + p*C_1 + p*C_2, -p*C_2; -p*C_2, G_1 + p*C_2]
Δ13 := (-1)^(1 + 3)*[-p*C_1, G_2 + p*C_1 + p*C_2; -G_1, -p*C_2]
C_2*R_1 = 0.001944
C_1*C_2*R_1*R_2 = 6.9984e-5
|(-1)^(1 + 1)*[G2 + p*C1 + p*C2, -p*C2; -p*C2, G1 + p*C2]| → (C1*R2*p + C2*R1*p + C2*R2*p + C1*C2*R1*R2*p^2 + 1)/(R1*R2)
δ11 := (C1*R2*p + C2*R1*p + C2*R2*p + C1*C2*R1*R2*p^2 + 1)/(R1*R2)
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|(-1)^(1 + 3)*[-p*C1, G2 + p*C1 + p*C2; -G1, -p*C2]| → (C1*R2*p + C2*R2*p + C1*C2*R1*R2*p^2 + 1)/(R1*R2)
δ13 := (C1*R2*p + C2*R2*p + C1*C2*R1*R2*p^2 + 1)/(R1*R2)
WP(p) := δ13/δ11 → (C1*R2*p + C2*R2*p + C1*C2*R1*R2*p^2 + 1)/(C1*R2*p + C2*R1*p + C2*R2*p + C1*C2*R1*R2*p^2 + 1)
Wp(p) := (C_1*R_2*p + C_2*R_2*p + C_1*C_2*R_1*R_2*p^2 + 1)/(C_1*R_2*p + C_2*R_1*p + C_2*R_2*p + C_1*C_2*R_1*R_2*p^2 + 1) factor → (2.187e18*p^2 + 4.5e21*p + 3.125e22)/(2.187e18*p^2 + 4.56075e21*p + 3.125e22)
# загальний вигляд передаточної функції W(p)
Wp(p) → (4.5e21*p + 2.187e18*p^2 + 3.125e22)/(4.56075e21*p + 2.187e18*p^2 + 3.125e22) factor → (2.187e18*p^2 + 4.5e21*p + 3.125e22)/(2.187e18*p^2 + 4.56075e21*p + 3.125e22)
I3 := 0
# 1 )
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U_1(p) == (1/(p*C1) + R2)*I1 - 1/(p*C1)*I2 - R2*I3
# 3 )
U_2(p) == (1/(p*C2) + R2)*I3 - 1/(p*C2)*I2 - R2*I1
# 2 )
0 == (1/(p*C1) + 1/(p*C2) + R1)*I2 - 1/(p*C1)*I1 - 1/(p*C1)*I3 solve, I1 → (C1*I2 + C2*I2 + C1*C2*I2*R1*p)/C2
I1 := (C1*I2 + C2*I2 + C1*C2*I2*R1*p)/C2
U_1(p) == (1/(p*C1) + R2)*I1 - 1/(p*C1)*I2 - R2*I3 solve, I2 → C2*p*U_1(p)/(C1*R2*p + C2*R1*p + C2*R2*p + C1*C2*R1*R2*p^2 + 1)
I2 := C2*p*U_1(p)/(C1*R2*p + C2*R1*p + C2*R2*p + C1*C2*R1*R2*p^2 + 1)
U_2(p) == (1/(p*C2) + R2)*I3 - 1/(p*C2)*I2 - R2*I1 solve, U_2(p) → -U_1(p)/(C1*R2*p + C2*R1*p + C2*R2*p + C1*C2*R1*R2*p^2 + 1) - R2*(C1*I2 + C2*I2 + C1*C2*I2*R1*p)/C2
U2 := -U_1(p)/(C1*R2*p + C2*R1*p + C2*R2*p + C1*C2*R1*R2*p^2 + 1) - R2*(C1*I2 + C2*I2 + C1*C2*I2*R1*p)/C2 simplify → -U_1(p)*(C1*R2*p + C2*R2*p + C1*C2*R1*R2*p^2 + 1)/(C1*R2*p + C2*R1*p + C2*R2*p + C1*C2*R1*R2*p^2 + 1)
WW(p) := (C1*R2*p + C2*R2*p + C1*C2*R1*R2*p^2 + 1)/(C1*R2*p + C2*R1*p + C2*R2*p + C1*C2*R1*R2*p^2 + 1)
WW(p) == WP(p) → 1
(2.187e18*p^2 + 4.5e21*p + 3.125e22)/(2.187e18*p^2 + 4.56075e21*p + 3.125e22)
fs(s) := (2.187e18*s^2 + 4.5e21*s + 3.125e22)/(2.187e18*s^2 + 4.56e21*s + 3.125e22)
(1/2.187e18*(2.187e18*s^2 + 4.5e21*s + 3.125e22)/(1/2.187e18*(2.187e18*s^2 + 4.56e21*s + 3.125e22))) → (2057.61316872*s + 1.0*s^2 + 14288.9803384)/(2085.04801097*s + 1.0*s^2 + 14288.9803384)
(2057.6*s + 1.0*s^2 + 14288.98)/(2085.05*s + 1.0*s^2 + 14288.98) invlaplace → 0.0911210927103*e^(-6.87573715809*t) + Δ(t) - 27.5411210927*e^(-2078.17426284*t)
1 + (2057.6*s + 1.0*s^2 + 14288.98 - (2085.05*s + 1.0*s^2 + 14288.98))/(2085.05*s + 1.0*s^2 + 14288.98) → 1 - 27.45*s/(2085.05*s + 1.0*s^2 + 14288.98)
p_1 := -2078.17
2085.05*s + 1.0*s^2 + 14288.98 solve, s → [-2078.17426284; -6.87573715809]
p_2 := -6.88
d/ds(2085.05*s + 1.0*s^2 + 14288.98) → 2.0*s + 2085.05
# Вагова функція
ω(t) := Δ(t) - (27.45*p_1/(2*p_1 + 2085.05)*e^(p_1*t) + 27.45*p_2/(2*p_2 + 2085.05)*e^(p_2*t)) → Δ(t) + (-27.5411779616*e^(-2078.17*t)) + 0.0911779615602*e^(-6.88*t)
# Перехідна характеристика
h(t) := Δ(t) - (27.45/(2*p_1 + 2085.05)*e^(p_1*t) + 27.45/(2*p_2 + 2085.05)*e^(p_2*t)) → Δ(t) + 0.0132526106919*e^(-2078.17*t) + (-0.0132526106919*e^(-6.88*t))
1 - 27.45/(2085.05*s + 1.0*s^2 + 14288.98) invlaplace → Δ(t) - 0.0132525561427*e^(-6.87573715809*t) + 0.0132525561427*e^(-2078.17426284*t)
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1 - 19.44*10^-4*s/(69.984*10^-6*s^2 + 11.0592*10^-2*s + 1) invlaplace → Δ(t) - 27.9395050872*e^(-1571.15232734*t) + 0.161727309388*e^(-9.09458624076*t)
69.984*10^-6*s^2 + 11.0592*10^-2*s + 1 solve, s → [-9.09458624076; -1571.15232734]
d/ds(69.984*10^-6*s^2 + 11.0592*10^-2*s + 1) → 0.000139968*s + 0.110592
19.44*10^-4*(-9.09458624076*e^(-9.09458624076*t)/(0.000139968*(-9.09458624076) + 0.110592)) + 19.44*10^-4*(-1571.15232734*e^(-1571.15232734*t)/(0.000139968*(-1571.15232734) + 0.110592)) → -0.161727309388*e^(-9.09458624076*t) + 27.9395050872*e^(-1571.15232734*t)
(1 - 19.44*10^-4*s/(69.984*10^-6*s^2 + 11.0592*10^-2*s + 1))/s invlaplace → 0.0177828111259*e^(-1571.15232734*t) - 0.0177828111259*e^(-9.09458624076*t) + 1.0
1/s - 19.44*10^-4*s/(69.984*10^-6*s^3 + 11.0592*10^-2*s^2 + s) invlaplace → 0.0177828111259*e^(-1571.15232734*t) - 0.0177828111259*e^(-9.09458624076*t) + 1.0
