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α_1 := 3
α_2 := 1
N_z := 6
K := α_2*N_z + 10*α_1 = 36
R_1 := 50 = 50
R_2 := 1000
R_3 := 5*K = 180
C_1 := 0.1*K*10^-6 = 3.6e-6
G_1 := 1/R_1 = 0.02
G_2 := 1/R_2 = 0.001
g(t) := cos(50*t)
G_3 := 1/R_3 = 0.00555556
# фільтр верхніх частот
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Y(p) := [p*C1, 0, -p*C1; 0, G2 + G3, -G2; -p*C1, -G2, G1 + G2 + p*C1]
|Y(p)| → C1*G1*G2*p + C1*G1*G3*p + C1*G2*G3*p
Δ11(p) := (-1)^(1 + 1)*[G2 + G3, -G2; -G2, G1 + G2 + p*C1]
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|Δ11(p)| → G1*G2 + G1*G3 + G2*G3 + C1*G2*p + C1*G3*p
Δ12(p) := (-1)^(1 + 2)*[p*C1, 0; -p*C1, -G2]
|Δ12(p)| → -C1*G2*p
Wp(p) := |Δ12(p)|/|Δ11(p)| → -C1*G2*p/(G1*G2 + G1*G3 + G2*G3 + C1*G2*p + C1*G3*p)
-C_1*G_2*p/(G_1*G_2 + G_1*G_3 + G_2*G_3 + C_1*G_2*p + C_1*G_3*p) → -3.6e-9*p/(2.36e-8*p + 0.000136666666667)
Gs(s) := g(t) laplace → s/(s^2 + 2500)
Ws(s) := -0.153*s/(s + 5790.96)
3.6e-9/2.36e-8*s/(1/2.36e-8*(2.36e-8*s + 0.000136666666667)) → 0.152542372881*s/(1*s + 5790.96045198)
X(s) := Gs(s)*Ws(s) → -0.153*s^2/((s + 5790.96)*(s^2 + 2500)) invlaplace → -0.152988594931*e^(-5790.96*t) + (-5.70253472784e-6 - 0.000660463010151i)*e^(50.0i*t) + (-5.70253472784e-6 + 0.000660463010151i)*e^(-50.0i*t)
G1 := 1/R1
G2 := 1/R2
G3 := 1/R3
C1*G2*p/(G1*G2 + G1*G3 + G2*G3 + C1*G2*p + C1*G3*p) → C1*p/(R2*(1/(R1*R2) + 1/(R1*R3) + 1/(R2*R3) + C1*p/R2 + C1*p/R3)) simplify → C1*R1*R3*p/(R1 + R2 + R3 + C1*R1*R2*p + C1*R1*R3*p)
