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α_1 := 3
α_2 := 1
N_z := 6
K := α_2*N_z + 10*α_1 = 36
R_1 := 50 = 50
R_2 := 1000
R_3 := 5*K = 180
C_1 := 0.1*K*10^-6 = 3.6e-6
G_1 := 1/R_1 = 0.02
G_2 := 1/R_2 = 0.001
g(t) := cos(50*t)
G_3 := 1/R_3 = 0.00555556
# фільтр верхніх частот
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Y(p) := [p*C1, 0, -p*C1; 0, G2 + G3, -G2; -p*C1, -G2, G1 + G2 + p*C1]
|Y(p)| → C1*G1*G2*p + C1*G1*G3*p + C1*G2*G3*p
Y1(p) := [p*C1, 0; -p*C1, -G2]
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|Y1(p)| → -C1*G2*p
Δ11(p) := (-1)^(1 + 1)*(-G2) → -G2
Δ12(p) := (-1)^(1 + 2)*(-p*C1) → C1*p
W_k(p) := Δ12(p)/Δ11(p) → -C1*p/G2 substitute, G2 == 1/R2 → -C1*R2*p
W(s) := -C_1*s/G_2 → -0.0036*s
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G(s) := g(t) laplace → s/(s^2 + 2500)
X(s) := W(s)*G(s) → -0.0036*s^2/(s^2 + 2500) invlaplace → 0.18*sin(50.0*t) - 0.0036*Δ(t)
s^2 + 2500 solve, s → [50i; -50i]
-0.0036*s factor → -9*s/2500
-0.0036*s
