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α_1 := 3
α_2 := 1
N_z := 6
K := α_2*N_z + 10*α_1 = 36
K_1 := 0.01
j := sqrt(-1)
a := 0.1
b := 0.2
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Wp(p) := K*K_1/p(a*p^2 + b*p + 1) → 0.36/p(0.2*p + 0.1*p^2 + 1)  # error: Значение должно быть функцией, но имеет форму: Unitless.
Wn(ω) := Wp(j*ω) → -0.36i/ω(0.2i*ω + (-0.1*ω^2) + 1)  # error: Значение должно быть функцией, но имеет форму: Unitless.
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# y - (уявна)
# х - (дійсна)
Wω(ω) := sqrt((-0.36i/ω(0.2i*ω + (-0.1*ω^2) + 1))^2) → sqrt(-0.1296/ω(0.2i*ω + (-0.1*ω^2) + 1)^2)  # error: Значение должно быть функцией, но имеет форму: Unitless.
0.36/(0.1*p^3 + 0.2*p^2 + p)
0.36/(0.1*(j*ω)^3 + 0.2*(j*ω)^2 + (j*ω)) → -0.36/(0.2*ω^2 - 1.0i*ω + 0.1i*ω^3)
WW1(p) := K*K1/p(A*p^2 + B*p + 1)
0.1*(j*ω)^3 + 0.2*(j*ω)^2 + (j*ω) → -0.2*ω^2 - 0.1i*ω^3 + ω*1i
K*K1/(A*p^3 + B*p^2 + p)
K*K1/(A*(j*ω)^3 + B*(j*ω)^2 + (j*ω))
-0.2*ω^2 + j*(-0.1*ω^3 + ω)
A*(j*ω)^3 + B*(j*ω)^2 + (j*ω) → -A*ω^3*1i - B*ω^2 + ω*1i
(-0.2*ω^2 + j*(-0.1*ω^3 + ω))*(-0.2*ω^2 - j*(-0.1*ω^3 + ω)) simplify → 0.01*ω^6 - 0.16*ω^4 + ω^2
B*ω^2 + j*(-A*ω^3 + ω)
0.36*(-0.2*ω^2 - j*(-0.1*ω^3 + ω))/(0.01*ω^6 - 0.16*ω^4 + ω^2) → (-0.072*ω^2 - 0.36i*ω + 0.036i*ω^3)/(ω^2 + (-0.16*ω^4) + 0.01*ω^6)
(B*ω^2 + j*(-A*ω^3 + ω))*(B*ω^2 - j*(-A*ω^3 + ω)) simplify → A^2*ω^6 - 2*A*ω^4 + B^2*ω^4 + ω^2
(-0.072*ω^2 - 0.36*j*(-0.1*ω^3 + ω))/(0.01*ω^6 - 0.16*ω^4 + ω^2)
WW2(ω) := K*K1*(B*ω^2 - j*(-A*ω^3 + ω))/(A^2*ω^6 - 2*A*ω^4 + B^2*ω^4 + ω^2)
W1w(ω) := (-0.072*ω^2 - 0.36*j*(-0.1*ω^3 + ω))/(0.01*ω^6 - 0.16*ω^4 + ω^2)
WW3(ω) := (K*K1*B*ω^2 - K*K1*j*(-A*ω^3 + ω))/(A^2*ω^6 - 2*A*ω^4 + B^2*ω^4 + ω^2)
U(ω) := -0.072*ω^2/(0.01*ω^6 - 0.16*ω^4 + ω^2)
V(ω) := -0.36*(-0.1*ω^3 + ω)/(0.01*ω^6 - 0.16*ω^4 + ω^2)
UU(ω) := K*K1*B*ω^2/(A^2*ω^6 - 2*A*ω^4 + B^2*ω^4 + ω^2)
VV(ω) := -K*K1*(-A*ω^3 + ω)/(A^2*ω^6 - 2*A*ω^4 + B^2*ω^4 + ω^2)
W(ω) := sqrt(U(ω)^2 + V(ω)^2) simplify → 18.0*sqrt(1/(25.0*ω^6 - 400.0*ω^4 + 2500.0*ω^2))
VV(ω)/UU(ω) → -(ω - A*ω^3)/(B*ω^2)
φ(ω) := atan(-(ω - a*ω^3)*j/(b*ω^2)) → -atan(-1/ω^2*(0.5i*ω^3 + (-5.0i)*ω))
sqrt(UU(ω)^2 + VV(ω)^2) → sqrt(K1^2*K^2*(ω - A*ω^3)^2/(A^2*ω^6 - 2*A*ω^4 + B^2*ω^4 + ω^2)^2 + B^2*K1^2*K^2*ω^4/(A^2*ω^6 - 2*A*ω^4 + B^2*ω^4 + ω^2)^2)
limit(U(ω), ω → 0) → -0.072
limit(U(ω), ω → ∞) → 0.0
(K*K1*B*ω^2)^2 + (-K*K1*j*(-A*ω^3 + ω))^2 → B^2*K1^2*K^2*ω^4 - K1^2*K^2*(ω - A*ω^3)^2
limit(V(ω), ω → 0)  # error: First argument is not defined on assuming that mcvar_omega has property Type::Interval(-1/10000000, 1/10000000)
sqrt(B^2*K1^2*K^2*ω^4 - K1^2*K^2*(ω - A*ω^3)^2) simplify → sqrt(-K1^2*K^2*ω^2*(A^2*ω^4 - 2*A*ω^2 - B^2*ω^2 + 1))
limit(V(ω), ω → ∞) → 0
sqrt(-K1^2*K^2*ω^2*(A^2*ω^4 - 2*A*ω^2 - B^2*ω^2 + 1)) expand → sqrt(2*A*K1^2*K^2*ω^4 - A^2*K1^2*K^2*ω^6 + B^2*K1^2*K^2*ω^4 - K1^2*K^2*ω^2)
limit(W(ω), ω → 0) → ∞
limit(W(ω), ω → ∞) → 0.0
limit(φ(ω), ω → 0) → undefined
(2*A*K1^2*K^2*ω^4 - A^2*K1^2*K^2*ω^6 + B^2*K1^2*K^2*ω^4 - K1^2*K^2*ω^2)^(1/2)
limit(φ(ω), ω → ∞) → π/2
WW4(ω) := sqrt(2*A*K1^2*K^2*ω^4 - A^2*K1^2*K^2*ω^6 + B^2*K1^2*K^2*ω^4 - K1^2*K^2*ω^2)/(A^2*ω^6 - 2*A*ω^4 + B^2*ω^4 + ω^2)
ω1 := [0, 1, 3, 5, 7, 10, 15, 20, 100, 1000, 100000]
ω1[0, 5] = 10
φφ(ω) := atan(-(ω - A*ω^3)*j/(B*ω^2))
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cos(50 °) = 0.642788
cos(50*π/180) = 0.642788
