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K := 36
R_1 := 0.1*K = 3.6
C_1 := 5*K*10^-6 = 0.00018
R_2 := 200
C_2 := 15*K*10^-6 = 0.00054
G_1 := 1/R_1 = 0.277778
G_2 := 1/R_2 = 0.005
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Y := [G_1 + p*C_1, -p*C_1, -G_1; -p*C_1, G_2 + p*C_1 + p*C_2, -p*C_2; -G_1, -p*C_2, G_1 + p*C_2]
Δ11 := (-1)^(1 + 1)*[G_2 + p*C_1 + p*C_2, -p*C_2; -p*C_2, G_1 + p*C_2]
|Δ11| → 9.72e-8*p^2 + 0.0002027*p + 0.00138888888889
Δ13 := (-1)^(1 + 3)*[-p*C_1, G_2 + p*C_1 + p*C_2; -G_1, -p*C_2]
|Δ13| → 9.72e-8*p^2 + 0.0002*p + 0.00138888888889
Wp := |Δ13|/|Δ11| → (9.72e-8*p^2 + 0.0002*p + 0.00138888888889)/(9.72e-8*p^2 + 0.0002027*p + 0.00138888888889)
1/0.00138888888889*(9.72e-8*p^2 + 0.0002*p + 0.00138888888889)/(1/0.00138888888889*(9.72e-8*p^2 + 0.0002027*p + 0.00138888888889)) → (0.144*p + 6.9984e-5*p^2 + 1.0)/(0.145944*p + 6.9984e-5*p^2 + 1.0) factor → (5.4675e20*p^2 + 1.125e24*p + 7.8125e24)/(5.4675e20*p^2 + 1.1401875e24*p + 7.8125e24)
1 + (0.144*p + 6.9984e-5*p^2 + 1.0 - (0.145944*p + 6.9984e-5*p^2 + 1.0))/(0.145944*p + 6.9984e-5*p^2 + 1.0) → 1 - 0.001944*p/(0.145944*p + 6.9984e-5*p^2 + 1.0)
1 - 0.001944*s/(0.145944*s + 6.9984e-5*s^2 + 1.0) invlaplace → 0.0921787135981*e^(-6.87460572623*t) + Δ(t) - 27.8699564914*e^(-2078.51634078*t)
(0.144*p + 6.9984e-5*p^2 + 1.0)/(0.145944*p + 6.9984e-5*p^2 + 1.0)/p → (0.144*p + 6.9984e-5*p^2 + 1.0)/(p*(0.145944*p + 6.9984e-5*p^2 + 1.0))
(0.144*s + 6.9984e-5*s^2 + 1.0)/(0.145944*s^2 + 6.9984e-5*s^3 + s) invlaplace → 0.0134085818546*e^(-2078.51634078*t) - 0.0134085818546*e^(-6.87460572623*t) + 1.0
Wp1 := 1 - 0.001944*p/(0.145944*p + 6.9984e-5*p^2 + 1.0)
p_1 := -2078.516
p_2 := -6.875
A(p) := 0.145944*p + 6.9984e-5*p^2 + 1.0 solve, p → [-2078.51634078; -6.87460572623]
d/dp(0.145944*p + 6.9984e-5*p^2 + 1.0) → 0.000139968*p + 0.145944
ω(t) := Δ(t) + (0.001944*p_1)/(0.000139968*p_1 + 0.145944)*e^(p_1*t) + (0.001944*p_2)/(0.000139968*p_2 + 0.145944)*e^(p_2*t) → Δ(t) + 27.869961091*e^(-2078.516*t) + (-0.0921840353391*e^(-6.875*t))
(0.144*p + 6.9984e-5*p^2 + 1.0)/(p*(0.145944*p + 6.9984e-5*p^2 + 1))
c'(p) := 0.000139968*p + 0.145944
ω1(t) := (0.144*0 + 6.9984e-5*0^2 + 1.0)/(0.145944*0 + 6.9984e-5*0 + 1) + (0.144*p_1 + 6.9984e-5*p_1^2 + 1.0)*e^(p_1*t)/(p_1*(0.000139968*p_1 + 0.145944)) + (0.144*p_2 + 6.9984e-5*p_2^2 + 1.0)*e^(p_2*t)/(p_2*(0.000139968*p_2 + 0.145944)) → -0.0133512380357*e^(-6.875*t) + 0.0134084223144*e^(-2078.516*t) + 1.0
