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α_1 := 3
α_2 := 1
N_z := 6
K := α_2*N_z + 10*α_1 = 36
K_1 := 0.01
j := sqrt(-1)
a := 0.1
b := 0.2
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W(p) == K*K_1/p(a*p^2 + b*p + 1) → W(p) == 0.36/p(0.2*p + 0.1*p^2 + 1)
W_t(p) := 0.36/(p*(0.1*p^2 + 0.2*p + 1))
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W_t(j*ω) == (-0.072*ω^2 + 0.36*j*(0.1*ω^3 - ω))/(0.01*ω^6 - 0.16*ω^4 + ω^2)
W_t(j*ω) simplify; collect → -(36.0*ω - 18.0i*ω^2 + 180.0i)/(5.0*ω^5 - 80.0*ω^3 + 500.0*ω)
U(ω) := -0.072*ω^2/(0.01*ω^6 - 0.16*ω^4 + ω^2)
V(ω) := 0.36*(0.1*ω^3 - ω)/(0.01*ω^6 - 0.16*ω^4 + ω^2)
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# АФЧХ
ω := 0, 0.1 .. 10
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M :=
    x ← 0
    s ← 0
    step ← 0.1
    max_arr ← 10
    while x ≤ max_arr
        x ← x + step
        arr[s] ← x
        s ← s + 1
    arr
WW(ω) := -(36.0*ω - 18.0i*ω^2 + 180.0i)/(5.0*ω^5 - 80.0*ω^3 + 500.0*ω)
w1 := 0, 10000 .. 10000000
# АЧХ | Графік АЧХ
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W(ω) := sqrt(U(ω)^2 + V(ω)^2) simplify → 18.0*sqrt(1/(25.0*ω^6 - 400.0*ω^4 + 2500.0*ω^2))
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M = [
    0.1; 0.2; 0.3; 0.4; 0.5; 0.6; 0.7; 0.8; 0.9; 1
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]
Re(WW(M)) = [
    -0.0721153; -0.0724626; -0.0730459; -0.0738722; -0.0749512; -0.0762958; -0.077922; -0.0798495; -0.0821017; -0.0847059
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]
Im(WW(M)) = [
    -3.60216; -1.80432; -1.20648; -0.908628; -0.730774; -0.612909; -0.529313; -0.46712; -0.419175; -0.381176
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]
# Графік ФЧХ
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# Графік ЛАХ
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# Логарифмічне АЧХ (Amplitude-frequency characteristic)
# __
# |
# |
# |
# |
# |
# |
# |
# |
# |
# |
W1_AFC(p) := 0.36
W1_AFC(j*ω) simplify → 0.36
0.36
W2_AFC(p) := 1/p
W2_AFC(j*ω) simplify → -1i/ω
1/ω
# Графік ЛФХ
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10/sqrt(ω^4 - 16.0*ω^2 + 100.0)
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W3_AFC(p) := 1/(0.1*p^2 + 0.2*p + 1)
W3_AFC(j*ω) simplify; collect → -(10.0*ω^2 - 100.0 + 20.0i*ω)/(ω^4 - 16.0*ω^2 + 100.0)
L(ω) := 20*log(0.36) + 20*log(1/ω) + 20*log(10.0*1/sqrt(ω^4 - 16.0*ω^2 + 100.0))
20*log(0.36) - 20*log(ω) + 20*log(10.0) - 20*log(sqrt(ω^4 - 16.0*ω^2 + 100.0))
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sqrt((-10.0*ω^2 + 100.0)^2 + (-20.0*ω)^2) simplify → sqrt(100.0*ω^4 - 1600.0*ω^2 + 10000.0)
sqrt(100.0*ω^4 - 1600.0*ω^2 + 10000.0)/(ω^4 - 16.0*ω^2 + 100.0) simplify; collect → sqrt(100.0*ω^4 - 1600.0*ω^2 + 10000.0)/(ω^4 - 16.0*ω^2 + 100.0)
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U(ω) → -0.072*ω^2/(ω^2 + (-0.16*ω^4) + 0.01*ω^6)
# Логарифмічне ФЧХ (Phase-frequency characteristic)
V(ω) → (-0.36*ω + 0.036*ω^3)/(ω^2 + (-0.16*ω^4) + 0.01*ω^6)
W1_PFC(p) := 0.36
W1_PFC(j*ω) simplify → 0.36
W2_PFC(p) := 1/p
W2_PFC(j*ω) simplify → -1i/ω
W3_PFC(p) := 1/(0.1*p^2 + 0.2*p + 1)
W3_PFC(j*ω) simplify; collect → -(10.0*ω^2 - 100.0 + 20.0i*ω)/(ω^4 - 16.0*ω^2 + 100.0)
φ1_PFC(ω) := 0
φ2_PFC(ω) := -π/2
φ3_PFC(ω) := atan(-20.0*ω/(-10.0*ω^2 + 100.0)) simplify; collect → atan(2.0*ω/(ω^2 - 10.0))
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φ4_PFC(ω) :=
    φ3_PFC(ω) if U(ω) ≥ 0
    π + φ3_PFC(ω) if U(ω) < 0 and V(ω) ≥ 0
    -(π + φ3_PFC(ω)) if U(ω) < 0 and V(ω) < 0
# - чисельник додатній
# то і π буде додатній
Φ(ω) := -π/2 + φ1_PFC(ω) + φ2_PFC(ω) + φ4_PFC(ω)
3*π/2 = 4.71239
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# _______________________________________________________________________________________________________________________________________________________________________________
-20.0*ω/(ω^4 - 16.0*ω^2 + 100.0) solve → 0
fi(ω) :=
    atan(-20.0*ω/(ω^4 - 16.0*ω^2 + 100.0)/(-(10.0*ω^2 - 100.0)/(ω^4 - 16.0*ω^2 + 100.0))) if -(10.0*ω^2 - 100.0)/(ω^4 - 16.0*ω^2 + 100.0) ≥ sqrt(10)
    π + atan(-20.0*ω/(ω^4 - 16.0*ω^2 + 100.0)/(-(10.0*ω^2 - 100.0)/(ω^4 - 16.0*ω^2 + 100.0))) if -(10.0*ω^2 - 100.0)/(ω^4 - 16.0*ω^2 + 100.0) < sqrt(10) and -20.0*ω/(ω^4 - 16.0*ω^2 + 100.0) ≥ 0
    -(π + atan(-20.0*ω/(ω^4 - 16.0*ω^2 + 100.0)/(-(10.0*ω^2 - 100.0)/(ω^4 - 16.0*ω^2 + 100.0)))) if -(10.0*ω^2 - 100.0)/(ω^4 - 16.0*ω^2 + 100.0) < sqrt(10) and -20.0*ω/(ω^4 - 16.0*ω^2 + 100.0) < 0
-(10.0*ω^2 - 100.0)/(ω^4 - 16.0*ω^2 + 100.0) solve → [-3.16227766017; 3.16227766017]
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