# ДС-3106мп
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α_1 := 3
α_2 := 1
N_z := 6
j := sqrt(-1)
K := α_2*N_z + 10*α_1 = 36
C := 310
b_1 := 1.4
n_1 := 3
n_2 := 1
n_3 := 0
n_4 := 6
# n_4 - парна
x := n_1 = 3
y := n_2 + n_3 = 1
z := n_4 = 6
m_1 := x + y + z = 10
m_2 := 2*(x + y + 2*z) = 32
W(p) := (p + m_2)/((p + x)*(p + y)*(p + z)) → (p + 32)/((p + 1)*(p + 3)*(p + 6))
W(p) collect → (p + 32)/(p^3 + 10*p^2 + 27*p + 18)
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q'(a) == 0
q(a) := 4*c/(π*a)*cos(φ_1)
sin(φ_1) == b/a
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cos(φ_1) := sqrt(1 - (b/a)^2)
q(a) := 4*c/(π*a)*sqrt(1 - (b/a)^2)
a > b
A(p) + B(p)*q(a) == 0
(p + 1)*(p + 3)*(p + 6) + (p + 32)*q(a) == 0
(j*ω + 1)*(j*ω + 3)*(j*ω + 6) simplify → 18 - 10*ω^2 - ω^3*1i + 27i*ω
(j*ω + 1)*(j*ω + 3)*(j*ω + 6) + (j*ω + 32)*q(a) == 0
18 + 32*q(a) - 10*ω^2 - ω^3*j + 27*j*ω + j*ω*q(a) == 0
P(a, ω) := 18 + 32*q(a) - 10*ω^2 == 0
Q(a, ω) := -ω^3 + 27*ω + ω*q(a) == 0
(-ω)^3 + 27*ω + ω*q(a) solve, q(a) → ω^2 - 27
-ω^3 + 27*ω + ω*q(a) solve, ω → [0; sqrt(q(a) + 27); -sqrt(q(a) + 27)]
18 + 32*(ω^2 - 27) - 10*ω^2 == 0 solve, ω → [3*sqrt(517)/11; -3*sqrt(517)/11]
18 + 32*q(a) - 10*ω^2 == 0 substitute, ω == 3*sqrt(517)/11 → 32*q(a) - 4032/11 == 0
32*q(a) - 4032/11 == 0
126/11 → 126/11 = 11.4545
q(a) := 4032/(11*32) → 126/11
4*310 → 1240 = 1240
b_1 = 1.4
q_1(a) := 126/11
4*310/(π*a) simplify → 1240/(π*a) = 1240/(mc_π*mc_a)
q(a) := 4*C/(π*a)*sqrt(1 - (b_1/a)^2)
C = 310
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(j*ω + 1)^2*(j*ω + 3) collect → 3 - 5*ω^2 - 1i*ω^3 + 7i*ω
q_.(a) ≤ 4*310/(π*a)
2*C/(π*b_1) = 140.966
4*C/(π*a)*sqrt(1 - (b_1/a)^2) == 126/11 solve, a → [1.40115884098; 34.4298092611]
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(d/da(P))^X == 32*(d/da(q(a)))
(d/dω(P))^X == -20*ω == (-60*sqrt(517)/11 < 0)
3*sqrt(517)/11
(d/da(Q))^X == 3*sqrt(517)/11*(d/da(q(a)))
-3*(3*sqrt(517)/11)^2 + 27 + q(a) → -846/11
(d/dω(Q))^X == -3*ω^2 + 27 + q(a) == (-846/11 < 0)
-846/11*32 → -27072/11 = -2461.09
(d/da(P))^X*(d/dω(Q))^X - (d/dω(P))^X*(d/da(Q))^X > 0
-60*sqrt(517)/11*3*sqrt(517)/11 = -769.091
-2.461*10^3*d/da(q(a)) + 769.091*d/da(q(a)) > 0
-2.461*10^3 + 769.091 = -1691.91
-1.692*10^3*d/da(q(a)) > 0
a_1 := 1.401  # при даній амплітуді періодичного рішення система не стійка
a_2 := 34.43  # при даній амплітуді періодичного рішення система стійка
u(v) := 4*C/(π*v)*sqrt(1 - (b_1/v)^2) → 1240*sqrt(1 - 1.96/v^2)/(π*v)
-1.2732e-17*(1.55e20*v^2 - 6.076e20)*sqrt(25.0 - 49.0/v^2)/(v^2*(25.0*v^2 - 49.0))
q_2(a) := 126/(11*K)
# перша похідна
140.966 == 126/(11*K) solve, K; float, 5 → 0.081258
d/dv(1240*sqrt(1 - 1.96/v^2)/(π*v)) simplify; rectangular; float, 5 → 0.04*(193405.0*|v| + (-49338.0*v^2*|v|))/(v^4*sqrt(25.0*v^2 - 49.0))
K := 126/(140.966*11) = 0.0812575
0.04*(193405.0*|v| + (-49338.0*v^2*|v|))/(v^4*sqrt(25.0*v^2 - 49.0)) == 0 solve; float, 5 → [0; 1.9799; -1.9799]
u(1.9799) → 140.965806738
2*C/(π*b_1) = 140.966
# друга похідна
